# 2. Проектирование
# 2.1. Проектирование стабилизатора напряжения
Uвых := 8 V
Iнmax := 400 mA
αmax := 0.12
αmin := 0.1
Uвх.стmin := Uвых + 3 V = 11 V
Uвх.ст.ном := Uвх.стmin/(1 - αmin) = 12.2222 V
Uвх.стmax := Uвх.ст.ном*(1 + αmax) = 13.6889 V
Iвх.стmax := 1.2*Iнmax = 480 mA
ω := 314 s^-1
m := 1
# Выбор стабилитрона VD1
Uст.расч := 0.8*Uвых = 6.4 V
Iстmin := 50 mA
Iстmax := 1.15 A = 1150 mA
Pmax := 8 W
# Выбор транзистора VT1
IKVT1maxрасч := Iвх.стmax = 480 mA
UКЭVT1maxрасч := Uвх.стmax - Uвых = 5.68889 V
PVT1maxрасч := (Uвх.стmax - Uвых)*Iвх.стmax = 2.73067 W
IKOVT1 := 5000 μA = 5 mA
βVT1 := 30
# Выбор транзистора VT2
IKVT1 := 0.5 A
IKVT2 := IKVT1/βVT1 = 16.6667 mA
UКЭVT2maxрасч := Uвх.стmax - Uвых = 5.68889 V
PVT2maxрасч := (Uвх.стmax - Uвых)*IKVT2 = 94.8148 mW
IKOVT2 := 50 μA
βVT2 := 40
# Выбор транзистора VT 3
IKVT3 := IKVT2/βVT2 = 0.416667 mA
# Выбор транзистора VT 4
UVD1 := Uст.расч = 6.4 V
UКЭVT4maxрасч := Uвых - UVD1 = 1.6 V
# Выбор резистора R1
Uвх.ном := Uвх.ст.ном = 12.2222 V
UVD1 = 6.4 V
R1 := (Uвх.ном - 3 V - UVD1)/(4*10^-3 A) = 705.556 Ω
R1 := 750 Ω
PR1 := (4*10^-3 A)^2*R1 = 12 mW
# Выбор резистора R2
Uвых = 8 V
UVD1 = 6.4 V
R2 := (Uвых - UVD1)/(5*10^-3 A) = 320 Ω
R2 := 300 Ω
PR2расч := (Uвых - UVD1)^2/R2 = 8.53333 mW
IVD1 := 4 mA + (Uвых - UVD1)/R2 = 9.33333 mA
Iстmax = 1150 mA
# Выбор резисторов R3, R4, R5
Uвых = 8 V
Iнmax = 0.4 A
Uвых/(0.1*Iнmax) = 200 Ω
UVD1 = 6.4 V
UБЭVT4 := 0.6 V
R5расч := Uвых/(0.1*Iнmax)*(UVD1 + UБЭVT4)/Uвых = 175 Ω
R5 := 160 Ω
R3 := 43 Ω
PR3 := (0.1*Iнmax)^2*R3 = 68.8 mW
PR5 := (0.1*Iнmax)^2*R5 = 256 mW
# Выбор резисторов R6, R7
IKOVT1 = 5 mA
R7 := 2*Uвых/IKOVT1 = 3.2 kΩ
PR7 := IKOVT1^2*R7 = 80 mW
R7 := 3 kΩ
# 2.2. Проектирование сглаживающего фильтра
Uвх.ст.ном = 12.2222 V
Uвх.ф.ном := 1.1*Uвх.ст.ном = 13.4444 V
αmax = 0.12
Uвх.ф.max := Uвх.ф.ном*(1 + αmax) = 15.0578 V
Iн.min := 300 mA = 0.3 A
Iвх.ст.min := 1.15*Iн.min = 0.345 A
Lрасч := 2*Uвх.ф.max/(m*ω*Iвх.ст.min) = 0.277998 H
Iподм := Iвх.стmax = 0.48 A
L := 0.22 H
q1вых := 0.03
q1 := 1.57
sтр := q1/q1вых = 52.3333
C := 10*(sтр + 1)/(L*m^2*10^6)*s^2 = 2424.24 μF
# 2.3. Выбор параметров диодной схемы выпрямителя
Uвх.ф.ном = 13.4444 V
Iвх.стmax = 0.48 A
fc := 50 Hz
B := 1.5*N/(A*m)
Kr := 2.3*(S*m^(3/4)/A^(5/4))^-1
RT := Kr*Uвх.ф.ном/(Iвх.стmax*fc*B)*nthroot(fc*B/(Uвх.ф.ном*Iвх.стmax), 4) = 1.58594 Ω
Uвх.фmax := Uвх.ф.max = 15.0578 V
Uобрmax := 0.5*π*Uвх.фmax = 23.6527 V
Iвх.стmax = 0.48 A
Iпр.ср := 0.5*Iвх.стmax = 0.24 A
RVD := 0.3 Ω
R := RT + RVD = 1.88594 Ω
A := Iвх.стmax*π*R/Uвх.ф.ном = 0.211532
B := 1.01
D := 2.25
UC0 := 1.2*sqrt(2)*B*Uвх.фmax = 25.8094 V
U2 := B*Uвх.ф.ном = 13.5789 V
Pвх.ф := Uвх.ф.ном*Iвх.стmax = 6.45333 W
I2 := D/2*Iвх.стmax = 0.54 A
I1 := 0.707*D*Iвх.стmax*U2/(220 V) = 0.0471286 A
ST := 0.85*B*D*Pвх.ф = 12.4654 W
Uобрmax := 2.82*B*Uвх.фmax = 42.8876 V
# 2.4. Расчет параметров трансформатора
ST = 12.4654 W
KM := 0.22 + (0.28 - 0.22)/(50 W)*ST = 0.234959
SстSок.расч := (12.465*100/(2.22*50*1.5*3*0.235*0.94*0.76)) cm^4 = 14.8644 cm^4
W1 := 220*(1 - 8/100)*10^4/(4.44*50*1.5*6.25) = 972.492
W2 := 13.579*(1 + 13/100)*10^4/(4.44*50*1.5*6.25) = 73.7262
I1 = 0.0471286 A
d1.расч := 1.13*sqrt(0.047/3) mm = 0.141438 mm
I2 = 0.54 A
d2.расч := 1.13*sqrt(0.54/3) mm = 0.479418 mm
Kтр := 973/74 = 13.1486
